/*
In this file all drivers of the SimplePelvis model are defined.
The number of drivers and their properties are determined by
the given joints of the pelvic floor segments in SimplePelvisJoints.any.
  cranial movement  -->  -y

separate drivers for the individual testcases and calibration are defined
*/


// -------------------------------------------------------------------
// ----------------------- TESTCASE DRIVERS --------------------------
// -------------------------------------------------------------------
Main = {
  AnyFolder SimplePelvisDrivers = {
    AnyKinEqSimpleDriver ActuatorA = {
      AnyKinMeasure &jnt = Main.HumanModel.BodyModel.Trunk.Joints.SimplePelvisJoints.jSegA;
      DriverVel = {-0.0005}; // mm/s
      Reaction.Type = {Off};
     };

    AnyKinEqSimpleDriver ActuatorB = {
      AnyKinMeasure &jnt = Main.HumanModel.BodyModel.Trunk.Joints.SimplePelvisJoints.jSegB;
      DriverVel = {-0.0005}; // mm/s
      Reaction.Type = {Off};
    };

    AnyKinEqSimpleDriver ActuatorC = {
      AnyKinMeasure &jnt = Main.HumanModel.BodyModel.Trunk.Joints.SimplePelvisJoints.jSegC;
      DriverVel = {-0.005}; // mm/s
      Reaction.Type = {Off};
    };

    AnyKinEqSimpleDriver ActuatorD = {
      AnyKinMeasure &jnt = Main.HumanModel.BodyModel.Trunk.Joints.SimplePelvisJoints.jSegD;
      DriverVel = {-0.005}; // mm/s
      Reaction.Type = {Off};
    };

    AnyKinEqSimpleDriver ActuatorE = {
      AnyKinMeasure &jnt = Main.HumanModel.BodyModel.Trunk.Joints.SimplePelvisJoints.jSegE;
      DriverVel = {-0.005}; // mm/s
      Reaction.Type = {Off};
    };

    AnyKinEqSimpleDriver ActuatorF = {
      AnyKinMeasure &jnt = Main.HumanModel.BodyModel.Trunk.Joints.SimplePelvisJoints.jSegF;
      DriverVel = {-0.005}; // mm/s
      Reaction.Type = {Off};
    };

    AnyKinEqSimpleDriver ActuatorG = {
      AnyKinMeasure &jnt = Main.HumanModel.BodyModel.Trunk.Joints.SimplePelvisJoints.jSegG;
      DriverVel = {-0.005}; // mm/s
      Reaction.Type = {Off};
    };
  };
};

// reference all drivers of Thoracic.main which are not within the body model in this folder to be added to the study
Main = {
  AnyFolder ThoracicDrivers = {
    AnyKinEqSimpleDriver &MannequinDriver1 = Main.HumanModel.DefaultMannequinDrivers.PelvisGroundDriverPosX;
    AnyKinEqSimpleDriver &MannequinDriver2 = Main.HumanModel.DefaultMannequinDrivers.PelvisGroundDriverPosY;
    AnyKinEqSimpleDriver &MannequinDriver3 = Main.HumanModel.DefaultMannequinDrivers.PelvisGroundDriverPosZ;
    AnyKinEqSimpleDriver &MannequinDriver4 = Main.HumanModel.DefaultMannequinDrivers.PelvisGroundDriverRotZ;
    AnyKinEqSimpleDriver &MannequinDriver5 = Main.HumanModel.DefaultMannequinDrivers.PelvisGroundDriverRotY;
    AnyKinEqSimpleDriver &MannequinDriver6 = Main.HumanModel.DefaultMannequinDrivers.PelvisGroundDriverRotX;

    // Add a driver which drives the whole spine. The spine rhythms handles the individual DOFs, but rhytms can be disabled
    // for full control of all DOFs. -- was moved from Study to here to keep it tidy
    SimpleFourierDriver Trunk_Extension = {
       AnyKinMeasure &ref1 = Main.HumanModel.BodyModel.Interface.Trunk.PelvisThoraxExtension;
       RangeOfMotion = {0, 0}*pi/180;
       Freq = 1/(Main.Study.tEnd-Main.Study.tStart);
       Phase = 0*pi/180;
       Reaction.Type ={Off};
    };
    SimpleFourierDriver Trunk_LateralBending = {
       AnyKinMeasure &ref2 = Main.HumanModel.BodyModel.Interface.Trunk.PelvisThoraxLateralBending;
       RangeOfMotion = {0, 0} *pi/180;
       Freq = 0.5/(Main.Study.tEnd-Main.Study.tStart);
       Phase = 180 *pi/180;
       Reaction.Type ={Off};
    };
    SimpleFourierDriver Trunk_AxialRotation = {
       AnyKinMeasure &ref3 = Main.HumanModel.BodyModel.Interface.Trunk.PelvisThoraxRotation;
       RangeOfMotion = {0, 0} *pi/180;
       Freq = 0.25/(Main.Study.tEnd-Main.Study.tStart);
       Phase = 0 * pi/180;
       Reaction.Type ={Off};
    };
  };
};// ---------------------------------------------- END OF TESTCASE DRIVERS


// -------------------------------------------------------------------
// --------------------- CALIBRATION DRIVERS -------------------------
// -------------------------------------------------------------------

// these drivers should not be changed because they have an impact on the parameters Lf0 and Lt0 of the calibrated muscles
Main = {
  AnyFolder SimplePelvisCalibrationDrivers = {
    AnyKinEqSimpleDriver ActuatorA = {

      AnyKinMeasure &jnt = Main.HumanModel.BodyModel.Trunk.Joints.SimplePelvisJoints.jSegA;
      DriverPos = {0.005};
      DriverVel = {-0.01}; // mm/s
      Reaction.Type = {Off};
    };

    AnyKinEqSimpleDriver ActuatorB = {
      AnyKinMeasure &jnt = Main.HumanModel.BodyModel.Trunk.Joints.SimplePelvisJoints.jSegB;
      DriverPos = {0.005};
      DriverVel = {-0.01}; // mm/s
      Reaction.Type = {Off};
    };

    AnyKinEqSimpleDriver ActuatorC = {
      AnyKinMeasure &jnt = Main.HumanModel.BodyModel.Trunk.Joints.SimplePelvisJoints.jSegC;
      DriverPos = {0.02};
      DriverVel = {-0.03}; // mm/s
      Reaction.Type = {Off};
    };

    AnyKinEqSimpleDriver ActuatorD = {
      AnyKinMeasure &jnt = Main.HumanModel.BodyModel.Trunk.Joints.SimplePelvisJoints.jSegD;
      DriverPos = {0.02};
      DriverVel = {-0.03}; // mm/s
      Reaction.Type = {Off};
    };

    AnyKinEqSimpleDriver ActuatorE = {
      AnyKinMeasure &jnt = Main.HumanModel.BodyModel.Trunk.Joints.SimplePelvisJoints.jSegE;
      DriverPos = {0.02};
      DriverVel = {-0.03}; // mm/s
      Reaction.Type = {Off};
    };

    AnyKinEqSimpleDriver ActuatorF = {
      AnyKinMeasure &jnt = Main.HumanModel.BodyModel.Trunk.Joints.SimplePelvisJoints.jSegF;
      DriverPos = {0.02};
      DriverVel = {-0.03}; // mm/s
      Reaction.Type = {Off};
    };

    AnyKinEqSimpleDriver ActuatorG = {
      AnyKinMeasure &jnt = Main.HumanModel.BodyModel.Trunk.Joints.SimplePelvisJoints.jSegG;
      DriverPos = {0.02};
      DriverVel = {-0.03}; // mm/s
      Reaction.Type = {Off};
    };
  };
}; // ---------------------------------------------- END OF CALIBRATION DRIVERS
