/*
  In this file all segments of the SimplePelvis model are constrained to the Pelvis.
  Where applicable, FDK constraints are introduced to the joints.

  Separate joints for the individual testcase and calibration are defined
  (similar to drivers) because calibration requires prescribed motion.
*/

// -------------------------------------------------------------------
// --------------------- TESTCASE JOINTS -----------------------------
// -------------------------------------------------------------------
Main = {

  AnyFolder SimplePelvisJoints = {

    // -------------------------------------------------------------------
    // --------- JOINTS FOR SEGMENTS IN THE CENTER OF THE PELVIS ---------
    // -------------------------------------------------------------------

    // these joints connect a node from BONYPELVIS to a moveable segment with a letter (A-G)
    // movement is allowed through joint (AnyPrismaticJoint) and FDK

    AnyPrismaticJoint jSegA = {
      AnyRefFrame &Pelvis = Main.HumanModel.BodyModel.Trunk.Segments.PelvisSeg.PICS_ORIGIN.PUBIS_R;
      AnyRefFrame &Seg = Main.HumanModel.BodyModel.Trunk.Segments.SimplePelvis.SegPointA.NodePUBIS_R;
       Axis = y;
      // set up FDK with ForceDep constraints for all locked DoF
      Constraints = {
        CType = {ForceDep, ForceDep, Hard, Hard, Hard};
        Reaction.Type = {Off, Off, On, On, On};
      };
      // define springs in the joint for all ForceDep DoF
      AnyForce JointStiffness = {
        AnyKinLinear &lin = Main.SimplePelvisJoints.jSegA.Linear;
        // estimate stiffness through G of LAM (Gachon); A of LAM  5.35 cm^2 (Alperin); l of LAM 10 cm (Gmür)
        // D = G * A / L -- in this case for contraction 306 N/m
        F = {-306*lin.Pos[0], 0, 0}; // nummerical value resembles spring constant (F = D * dL)
      };
    };

    AnyPrismaticJoint jSegB = {
      AnyRefFrame &Pelvis = Main.HumanModel.BodyModel.Trunk.Segments.PelvisSeg.PICS_ORIGIN.PUBIS_L;
      AnyRefFrame &Seg = Main.HumanModel.BodyModel.Trunk.Segments.SimplePelvis.SegPointB.NodePUBIS_L;
      Axis = y;
      // set up FDK with ForceDep constraints for all locked DoF
      Constraints = {
        CType = {ForceDep, ForceDep, Hard, Hard, Hard};
        Reaction.Type = {Off, Off, On, On, On};
      };
      // define springs in the joint for all ForceDep DoF
      AnyForce JointStiffness = {
        AnyKinLinear &lin = Main.SimplePelvisJoints.jSegB.Linear;
        // estimate stiffness through G of LAM (Gachon); A of LAM  5.35 cm^2 (Alperin); l of LAM 10 cm (Gmür)
        // D = G * A / L -- in this case for contraction 306 N/m
        F = {-306*lin.Pos[0], 0, -306*lin.Pos[2]}; // nummerical value resembles spring constant (F = D * dL)
      };
    };

    AnyPrismaticJoint jSegC = {
      AnyRefFrame &Pelvis = Main.HumanModel.BodyModel.Trunk.Segments.PelvisSeg.PICS_ORIGIN.COCCYX;
      AnyRefFrame &Seg = Main.HumanModel.BodyModel.Trunk.Segments.SimplePelvis.SegPointC.NodeCOCCYX;
      Axis = y;
      // set up FDK with ForceDep constraints for all locked DoF
      Constraints = {
        CType = {ForceDep, ForceDep, Hard, Hard, Hard};
        Reaction.Type = {Off, Off, On, On, On};
      };
      // define springs in the joint for all ForceDep DoF
      AnyForce JointStiffness = {
        AnyKinLinear &lin = Main.SimplePelvisJoints.jSegC.Linear;
        // estimate stiffness through G of LAM (Gachon); A of LAM  5.35 cm^2 (Alperin); l of LAM 10 cm (Gmür)
        // D = G * A / L -- in this case for contraction 306 N/m
        F = {-306*lin.Pos[0], 0, -306*lin.Pos[2]}; // nummerical value resembles spring constant (F = D * dL)
      };
    };

    AnyPrismaticJoint jSegD = {
      AnyRefFrame &Pelvis = Main.HumanModel.BodyModel.Trunk.Segments.PelvisSeg.PICS_ORIGIN.PUBIS_R;
      AnyRefFrame &Seg = Main.HumanModel.BodyModel.Trunk.Segments.SimplePelvis.SegPointD.NodePUBIS_R;
      Axis = y;
      // set up FDK with ForceDep constraints for all locked DoF
      Constraints = {
        CType = {ForceDep, ForceDep, Hard, Hard, Hard};
        Reaction.Type = {Off, Off, On, On, On};
      };
      // define springs in the joint for all ForceDep DoF
      AnyForce JointStiffness = {
        AnyKinLinear &lin = Main.SimplePelvisJoints.jSegD.Linear;
        // estimate stiffness through G of LAM (Gachon); A of LAM  5.35 cm^2 (Alperin); l of LAM 10 cm (Gmür)
        // D = G * A / L -- in this case for contraction 306 N/m
        F = {-306*lin.Pos[0], 0, -306*lin.Pos[2]}; // nummerical value resembles spring constant (F = D * dL)
      };
    };

    AnyPrismaticJoint jSegE = {
      AnyRefFrame &Pelvis = Main.HumanModel.BodyModel.Trunk.Segments.PelvisSeg.PICS_ORIGIN.PUBIS_L;
      AnyRefFrame &Seg = Main.HumanModel.BodyModel.Trunk.Segments.SimplePelvis.SegPointE.NodePUBIS_L;
      Axis = y;
      // set up FDK with ForceDep constraints for all locked DoF
      Constraints = {
        CType = {ForceDep, ForceDep, Hard, Hard, Hard};
        Reaction.Type = {Off, Off, On, On, On};
      };
      //  define springs in the joint for all ForceDep DoF
      AnyForce JointStiffness = {
        AnyKinLinear &lin = Main.SimplePelvisJoints.jSegE.Linear;
        // estimate stiffness through G of LAM (Gachon); A of LAM  5.35 cm^2 (Alperin); l of LAM 10 cm (Gmür)
        // D = G * A / L -- in this case for contraction 306 N/m
        F = {-306*lin.Pos[0], 0, -306*lin.Pos[2]}; // nummerical value resembles spring constant (F = D * dL)
      };
    };

    AnyPrismaticJoint jSegF = {
      AnyRefFrame &Pelvis = Main.HumanModel.BodyModel.Trunk.Segments.PelvisSeg.PICS_ORIGIN.COCCYX;
      AnyRefFrame &Seg = Main.HumanModel.BodyModel.Trunk.Segments.SimplePelvis.SegPointF.NodeCOCCYX;
      Axis = y;
      // set up FDK with ForceDep constraints for all locked DoF
      Constraints = {
        CType = {ForceDep, ForceDep, Hard, Hard, Hard};
        Reaction.Type = {Off, Off, On, On, On};
      };
      // define springs in the joint for all ForceDep DoF
      AnyForce JointStiffness = {
        AnyKinLinear &lin = Main.SimplePelvisJoints.jSegF.Linear;
        // estimate stiffness through G of LAM (Gachon); A of LAM  5.35 cm^2 (Alperin); l of LAM 10 cm (Gmür)
        // D = G * A / L -- in this case for contraction 306 N/m
        F = {-306*lin.Pos[0], 0, -306*lin.Pos[2]}; // nummerical value resembles spring constant (F = D * dL)
      };
    };

    AnyPrismaticJoint jSegG = {
      AnyRefFrame &Pelvis = Main.HumanModel.BodyModel.Trunk.Segments.PelvisSeg.PICS_ORIGIN.COCCYX;
      AnyRefFrame &Seg = Main.HumanModel.BodyModel.Trunk.Segments.SimplePelvis.SegPointG.NodeCOCCYX;
      Axis = y;
      // set up FDK with ForceDep constraints for all locked DoF
      Constraints = {
        CType = {ForceDep, ForceDep, Hard, Hard, Hard};
        Reaction.Type = {Off, Off, On, On, On};
      };
      // define springs in the joint for all ForceDep DoF
      AnyForce JointStiffness = {
        AnyKinLinear &lin = Main.SimplePelvisJoints.jSegG.Linear;
        // estimate stiffness through G of LAM (Gachon); A of LAM  5.35 cm^2 (Alperin); l of LAM 10 cm (Gmür)
        // D = G * A / L -- in this case for contraction 306 N/m
        F = {-306*lin.Pos[0], 0, -306*lin.Pos[2]}; // nummerical value resembles spring constant (F = D * dL)
      };
    };

    // -------------------------------------------------------------------
    // ------------ JOINTS FOR SEGMENTS ON THE TENDINOUS ARCH ------------
    // -------------------------------------------------------------------

    // these joints connect a node from PICS_ORIGIN to a moveable segment with a letter (S-Z)
    // movement is only allowed through FDK (AnyStdJoint) if at all
    AnyStdJoint jSegS = {
      AnyRefFrame &Pelvis = Main.HumanModel.BodyModel.Trunk.Segments.PelvisSeg.PICS_ORIGIN.PUBIS_R;
      AnyRefFrame &Seg = Main.HumanModel.BodyModel.Trunk.Segments.SimplePelvis.SegPointS.NodePUBIS_R;
    };

    AnyStdJoint jSegT = {
      AnyRefFrame &Pelvis = Main.HumanModel.BodyModel.Trunk.Segments.PelvisSeg.PICS_ORIGIN.PUBIS_R;
      AnyRefFrame &Seg = Main.HumanModel.BodyModel.Trunk.Segments.SimplePelvis.SegPointT.NodePUBIS_R;
    };

    AnyStdJoint jSegU = {
      AnyRefFrame &Pelvis = Main.HumanModel.BodyModel.Trunk.Segments.PelvisSeg.PICS_ORIGIN.PUBIS_R;
      AnyRefFrame &Seg = Main.HumanModel.BodyModel.Trunk.Segments.SimplePelvis.SegPointU.NodePUBIS_R;
    };

    AnyStdJoint jSegV = {
      AnyRefFrame &Pelvis = Main.HumanModel.BodyModel.Trunk.Segments.PelvisSeg.PICS_ORIGIN.PUBIS_R;
      AnyRefFrame &Seg = Main.HumanModel.BodyModel.Trunk.Segments.SimplePelvis.SegPointV.NodePUBIS_R;
    };

    AnyStdJoint jSegW = {
      AnyRefFrame &Pelvis = Main.HumanModel.BodyModel.Trunk.Segments.PelvisSeg.PICS_ORIGIN.PUBIS_L;
      AnyRefFrame &Seg = Main.HumanModel.BodyModel.Trunk.Segments.SimplePelvis.SegPointW.NodePUBIS_L;
    };

    AnyStdJoint jSegX = {
      AnyRefFrame &Pelvis = Main.HumanModel.BodyModel.Trunk.Segments.PelvisSeg.PICS_ORIGIN.PUBIS_L;
      AnyRefFrame &Seg = Main.HumanModel.BodyModel.Trunk.Segments.SimplePelvis.SegPointX.NodePUBIS_L;
    };

    AnyStdJoint jSegY = {
      AnyRefFrame &Pelvis = Main.HumanModel.BodyModel.Trunk.Segments.PelvisSeg.PICS_ORIGIN.PUBIS_L;
      AnyRefFrame &Seg = Main.HumanModel.BodyModel.Trunk.Segments.SimplePelvis.SegPointY.NodePUBIS_L;
    };

    AnyStdJoint jSegZ = {
      AnyRefFrame &Pelvis = Main.HumanModel.BodyModel.Trunk.Segments.PelvisSeg.PICS_ORIGIN.PUBIS_L;
      AnyRefFrame &Seg = Main.HumanModel.BodyModel.Trunk.Segments.SimplePelvis.SegPointZ.NodePUBIS_L;
    };

    // ---------------------------------------------- END OF JOINTS ON TENDINOUS ARCH

  }; // ---------------------------------------------- END OF FOLDER SimplePelvisJoints

}; // ---------------------------------------------- END OF TESTCASE JOINTS OF PELVIC FLOOR


// -------------------------------------------------------------------
// -------------------- CALIBRATION JOINTS ---------------------------
// -------------------------------------------------------------------
Main = {

  AnyFolder SimplePelvisCalibrationJoints = {

    // -------------------------------------------------------------------
    // --------- JOINTS FOR SEGMENTS IN THE CENTER OF THE PELVIS ---------
    // -------------------------------------------------------------------

    // these joints connect a node from BONYPELVIS to a moveable segment with a letter (A-G) - no FDK required

    AnyPrismaticJoint jSegA = {
      AnyRefFrame &Pelvis = Main.HumanModel.BodyModel.Trunk.Segments.PelvisSeg.PICS_ORIGIN.PUBIS_R;
      AnyRefFrame &Seg = Main.HumanModel.BodyModel.Trunk.Segments.SimplePelvis.SegPointA.NodePUBIS_R;
       Axis = y;
    };

    AnyPrismaticJoint jSegB = {
      AnyRefFrame &Pelvis = Main.HumanModel.BodyModel.Trunk.Segments.PelvisSeg.PICS_ORIGIN.PUBIS_L;
      AnyRefFrame &Seg = Main.HumanModel.BodyModel.Trunk.Segments.SimplePelvis.SegPointB.NodePUBIS_L;
      Axis = y;
    };

    AnyPrismaticJoint jSegC = {
      AnyRefFrame &Pelvis = Main.HumanModel.BodyModel.Trunk.Segments.PelvisSeg.PICS_ORIGIN.COCCYX;
      AnyRefFrame &Seg = Main.HumanModel.BodyModel.Trunk.Segments.SimplePelvis.SegPointC.NodeCOCCYX;
      Axis = y;
    };

    AnyPrismaticJoint jSegD = {
      AnyRefFrame &Pelvis = Main.HumanModel.BodyModel.Trunk.Segments.PelvisSeg.PICS_ORIGIN.PUBIS_R;
      AnyRefFrame &Seg = Main.HumanModel.BodyModel.Trunk.Segments.SimplePelvis.SegPointD.NodePUBIS_R;
      Axis = y;
    };

    AnyPrismaticJoint jSegE = {
      AnyRefFrame &Pelvis = Main.HumanModel.BodyModel.Trunk.Segments.PelvisSeg.PICS_ORIGIN.PUBIS_L;
      AnyRefFrame &Seg = Main.HumanModel.BodyModel.Trunk.Segments.SimplePelvis.SegPointE.NodePUBIS_L;
      Axis = y;
    };

    AnyPrismaticJoint jSegF = {
      AnyRefFrame &Pelvis = Main.HumanModel.BodyModel.Trunk.Segments.PelvisSeg.PICS_ORIGIN.COCCYX;
      AnyRefFrame &Seg = Main.HumanModel.BodyModel.Trunk.Segments.SimplePelvis.SegPointF.NodeCOCCYX;
      Axis = y;
    };

    AnyPrismaticJoint jSegG = {
      AnyRefFrame &Pelvis = Main.HumanModel.BodyModel.Trunk.Segments.PelvisSeg.PICS_ORIGIN.COCCYX;
      AnyRefFrame &Seg = Main.HumanModel.BodyModel.Trunk.Segments.SimplePelvis.SegPointG.NodeCOCCYX;
      Axis = y;
    };

    // -------------------------------------------------------------------
    // ------------ JOINTS FOR SEGMENTS ON THE TENDINOUS ARCH ------------
    // -------------------------------------------------------------------

    // these joints connect a node from PICS_ORIGIN to a moveable segment with a letter (S-Z)
    // movement is only allowed through FDK (AnyStdJoint) if at all
    AnyStdJoint jSegS = {
      AnyRefFrame &Pelvis = Main.HumanModel.BodyModel.Trunk.Segments.PelvisSeg.PICS_ORIGIN.PUBIS_R;
      AnyRefFrame &Seg = Main.HumanModel.BodyModel.Trunk.Segments.SimplePelvis.SegPointS.NodePUBIS_R;
    };

    AnyStdJoint jSegT = {
      AnyRefFrame &Pelvis = Main.HumanModel.BodyModel.Trunk.Segments.PelvisSeg.PICS_ORIGIN.PUBIS_R;
      AnyRefFrame &Seg = Main.HumanModel.BodyModel.Trunk.Segments.SimplePelvis.SegPointT.NodePUBIS_R;
    };

    AnyStdJoint jSegU = {
      AnyRefFrame &Pelvis = Main.HumanModel.BodyModel.Trunk.Segments.PelvisSeg.PICS_ORIGIN.PUBIS_R;
      AnyRefFrame &Seg = Main.HumanModel.BodyModel.Trunk.Segments.SimplePelvis.SegPointU.NodePUBIS_R;
    };

    AnyStdJoint jSegV = {
      AnyRefFrame &Pelvis = Main.HumanModel.BodyModel.Trunk.Segments.PelvisSeg.PICS_ORIGIN.PUBIS_R;
      AnyRefFrame &Seg = Main.HumanModel.BodyModel.Trunk.Segments.SimplePelvis.SegPointV.NodePUBIS_R;
    };

    AnyStdJoint jSegW = {
      AnyRefFrame &Pelvis = Main.HumanModel.BodyModel.Trunk.Segments.PelvisSeg.PICS_ORIGIN.PUBIS_L;
      AnyRefFrame &Seg = Main.HumanModel.BodyModel.Trunk.Segments.SimplePelvis.SegPointW.NodePUBIS_L;
    };

    AnyStdJoint jSegX = {
      AnyRefFrame &Pelvis = Main.HumanModel.BodyModel.Trunk.Segments.PelvisSeg.PICS_ORIGIN.PUBIS_L;
      AnyRefFrame &Seg = Main.HumanModel.BodyModel.Trunk.Segments.SimplePelvis.SegPointX.NodePUBIS_L;
    };

    AnyStdJoint jSegY = {
      AnyRefFrame &Pelvis = Main.HumanModel.BodyModel.Trunk.Segments.PelvisSeg.PICS_ORIGIN.PUBIS_L;
      AnyRefFrame &Seg = Main.HumanModel.BodyModel.Trunk.Segments.SimplePelvis.SegPointY.NodePUBIS_L;
    };

    AnyStdJoint jSegZ = {
      AnyRefFrame &Pelvis = Main.HumanModel.BodyModel.Trunk.Segments.PelvisSeg.PICS_ORIGIN.PUBIS_L;
      AnyRefFrame &Seg = Main.HumanModel.BodyModel.Trunk.Segments.SimplePelvis.SegPointZ.NodePUBIS_L;
    };

    // ---------------------------------------------- END OF JOINTS ON TENDINOUS ARCH

  }; // ---------------------------------------------- END OF FOLDER SimplePelvisCalibrationJoints

}; // ---------------------------------------------- END OF CALIBRATION JOINTS OF PELVIC FLOOR
